U_loadNom := 100  # Напряжение нагрузки [V]
i_load := 0.005  # Ток нагрузки [A]
U_supply := 12  # Напряжение питания бустерной схемы, [V]
R_T := 10*10^3
C_T := 4700*10^-12  # Частотозадающие параметры генератора ИС uc3843 [Ohm, F]
f_osc := 1.72/(R_T*C_T) = 36595.7  # Частота генератора ИС uc3843 [Hz]
t_period := 1/f_osc = 2.73256e-5  # Период тактовой частоты генератора
t_dead := 1.6*10^-6  # Мертвое время
Dc_max := 1 - t_dead/t_period = 0.941447  # Максимальный рабочий цикл
t_openMax := t_period*Dc_max = 2.57256e-5  # Максимальное время открытия
C_boost := 4.7*10^-6  # Емкость бустерного конденсатора [F]
L := 100*10^-6  # Дроссель [H]
I := U_supply*t_openMax/L = 3.08707
U_cond := sqrt(L/C_boost)*I = 14.2396
# Номиналы резисторов делителя напряжений обратной связи ИС uc3843 [Ohm]
R_1back := 1.2*10^6
R_2backPot := 20*10^3
R_3back := 10*10^3
U_backStop := 2.5  # Пороговое напряжение обратной связи, если выше него - ШИМ уменьшается
U_outMin := U_backStop*(R_1back + R_2backPot + R_3back)/(R_2backPot + R_3back) = 102.5  # Минимальное напряжение на выходе для данного делителя
U_outMax := U_backStop*(R_1back + R_2backPot + R_3back)/R_3back = 307.5  # Максимальное напряжение на выходе для данного делителя
I_backMax := U_outMax/(R_1back + R_2backPot + R_3back) = 0.00025  # Максимальный ток через делитель напряжения
P_max1 := I_backMax^2*R_1back = 0.075  # Рассеиваемые мощности на резисторах делителя
P_max2 := I_backMax^2*R_2backPot = 0.00125
P_max3 := I_backMax^2*R_3back = 0.000625
# Расчет тока зарядки MOSFET ключа МС uc3843
C_MOP := 1000*10^-12
f := 100  # Duty = 50
T_riseTimeUC3843 := 50*10^-9
T_fallTimeUC3843 := 50*10^-9
I_gate := C_MOP*12/T_riseTimeUC3843 = 0.24
C_iss := 1018*10^-12  # Входная емкость полевого транзистора
U_gs := 12  # Напряжение затвор-исток
T_riseTimeIR2110 := 35*10^-9
T_fallTimIR2110 := 25*10^-9
f_max := 1/(T_riseTimeIR2110*T_fallTimIR2110) = 1.14286e15
I_gate := C_iss*U_gs/T_riseTimeIR2110 = 0.349029  # Максимальный ток затвора
R_g := 47  # Ограничитель тока на затворе транзистора
I_realGate := U_gs/R_g = 0.255319
t_realRiseTimeIR2110 := C_iss*U_gs/I_realGate = 4.7846e-8  # 47 нс
f_real := 1/(2*t_realRiseTimeIR2110) = 10450194
# Расчет rc-фильтра на выходе ОУ INA122P
R_filterAmp := 1000
C_filterAmp := 1000*10^-9
f_cutOff := 1/(2*π*R_filterAmp*C_filterAmp) = 159.155
# Расчет бустерного конденсатора в цепи IR2110
Q_g := 38*10^-9
I_qbsMax := 230*10^-6
Q_ls := 5*10^-9
f := 100
I_CbsLeak := 0
V_LS := 0
V_min := 2  # Это Vgs(threshold)
V_cc := 12
V_f := 1.1
C := 2*(2*Q_g + I_qbsMax/f + Q_ls + I_CbsLeak/f)/(V_cc - V_f - V_LS - V_min) = 5.35056e-7
# Здесь подойдет керамич конденсатор 0.68мкФ
# Расчет по руководству из AND9674/D (ON Semiconductor)
Duty := 50  # Процент заполнения
t_ON := 1/(f*100/Duty) = 0.005
I_LKCAP := 0  # У керамич он равен нулю
I_LKGS := 100*10^-9  # Gate - Source Leakage Current
I_LK := 50*10^-6  # Offset Supply Leakage Current
I_LKDIODE := 5*10^-6  # Ток утечки через диод при обратном напряжении
Q_LS := 5*10^-9
Q_total := Q_g + (I_LKCAP + I_LKGS + I_LK + I_LKDIODE)*t_ON + Q_LS = 3.185e-7
V_CC := 12
V_F := 1.1
V_GSMIN := 2  # ???????????
V_boot := V_CC - V_F - V_GSMIN = 8.9
C_boot := Q_total/V_boot = 3.57865e-8  # 0.036мкФ
# Здесь подойдет керамич конденсатор 0.47мкФ
# Расчет снабберного конденсатора:
I_maxLoad := 50*10^-6
t_f := 19*10^-9
U_max := 310
CC := I_maxLoad*t_f/U_max = 3.06452e-15
